*Heading
** Job name: Fiber6 Model name: Model-1
** Generated by: Abaqus/CAE 2018
*Preprint, echo=NO, model=NO, history=NO, contact=NO
**
** PARTS
**
*Part, name=Part-1
*Node
      1,   510.556824,   111.064842,           0.
      2,   458.585114,   250.406418,           0.
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*Element, type=S4R
 1,   1,  52, 527,  74
 2,  52,  53, 528, 527
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*Nset, nset=_PickedSet4, internal
  28,  30,  31, 251, 252, 253
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*Elset, elset=_PickedSet4, internal, generate
 489,  521,    1
*Nset, nset=_PickedSet5, internal
   26,   28,   31,   43,  232,  233
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*Elset, elset=_PickedSet5, internal, generate
  975,  1021,     1
*Nset, nset=_PickedSet6, internal
    2,   26,   43,   45,  213,  214
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*Elset, elset=_PickedSet6, internal, generate
 1082,  1126,     1
*Nset, nset=_PickedSet7, internal
    1,    2,   45,   52,   53,   54
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*Elset, elset=_PickedSet7, internal, generate
 1182,  1212,     1
*Nset, nset=_PickedSet8, internal
   14,   16,   37,  138,  139,  140
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*Elset, elset=_PickedSet8, internal, generate
 648,  679,    1
*Nset, nset=_PickedSet9, internal
  16,  35,  36,  37, 299, 300
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*Elset, elset=_PickedSet9, internal, generate
 602,  647,    1
*Nset, nset=_PickedSet10, internal
  33,  34,  35,  36, 278, 279
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*Elset, elset=_PickedSet10, internal, generate
 555,  601,    1
*Nset, nset=_PickedSet11, internal
  32,  33,  34, 272, 273, 274
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*Elset, elset=_PickedSet11, internal, generate
 522,  554,    1
*Nset, nset=_PickedSet12, internal
  14,  15,  16,  17, 125, 126
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*Elset, elset=_PickedSet12, internal, generate
 185,  232,    1
*Nset, nset=_PickedSet13, internal
  12,  13,  14,  15, 108, 109
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*Elset, elset=_PickedSet13, internal, generate
 129,  184,    1
*Nset, nset=_PickedSet14, internal
  10,  11,  12,  13,  97,  98
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*Elset, elset=_PickedSet14, internal, generate
  89,  128,    1
*Nset, nset=_PickedSet15, internal
   10,   11,   38,   39,   97,   98
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*Elset, elset=_PickedSet15, internal, generate
 713,  760,    1
*Nset, nset=_PickedSet16, internal
    6,    7,   38,   39,   75,   76
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*Elset, elset=_PickedSet16, internal, generate
 680,  712,    1
*Nset, nset=_PickedSet17, internal
   6,   7,   8,   9,  75,  76
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*Elset, elset=_PickedSet17, internal, generate
 49,  88,   1
*Nset, nset=_PickedSet18, internal
    8,    9,   40,   41,   86,   87
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*Elset, elset=_PickedSet18, internal, generate
 761,  819,    1
*Nset, nset=_PickedSet19, internal
   30,   40,   41,   42,  358,  359
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*Elset, elset=_PickedSet19, internal, generate
 820,  907,    1
*Nset, nset=_PickedSet20, internal
   28,   29,   30,   42,  238,  239
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*Elset, elset=_PickedSet20, internal, generate
 908,  974,    1
*Nset, nset=_PickedSet21, internal
  26,  27,  28,  29, 219, 220
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*Elset, elset=_PickedSet21, internal, generate
 437,  488,    1
*Nset, nset=_PickedSet22, internal
   2,   4,  26,  27,  57,  58
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*Elset, elset=_PickedSet22, internal, generate
 377,  436,    1
*Nset, nset=_PickedSet23, internal
   1,   2,   3,   4,   5,  52
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*Elset, elset=_PickedSet23, internal, generate
  1,  48,   1
*Nset, nset=_PickedSet24, internal
   1,   5,  18,  19,  68,  69
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*Elset, elset=_PickedSet24, internal, generate
 233,  288,    1
*Nset, nset=_PickedSet25, internal
  18,  19,  20,  21, 155, 156
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*Elset, elset=_PickedSet25, internal, generate
 289,  336,    1
*Nset, nset=_PickedSet26, internal
   20,   21,   50,   51,  179,  180
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*Elset, elset=_PickedSet26, internal, generate
 1422,  1468,     1
*Nset, nset=_PickedSet27, internal
   22,   23,   50,   51,  191,  192
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*Elset, elset=_PickedSet27, internal, generate
 1469,  1501,     1
*Nset, nset=_PickedSet28, internal
  22,  23,  24,  25, 191, 192
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*Elset, elset=_PickedSet28, internal, generate
 337,  376,    1
*Nset, nset=_PickedSet29, internal
   24,   25,   48,   49,  202,  203
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*Elset, elset=_PickedSet29, internal, generate
 1363,  1421,     1
*Nset, nset=_PickedSet30, internal
   32,   47,   48,   49,  460,  461
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*Elset, elset=_PickedSet30, internal, generate
 1275,  1362,     1
*Nset, nset=_PickedSet31, internal
   32,   33,   46,   47,  272,  273
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*Elset, elset=_PickedSet31, internal, generate
 1213,  1274,     1
*Nset, nset=_PickedSet32, internal
   33,   35,   44,   46,  293,  294
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*Elset, elset=_PickedSet32, internal, generate
 1127,  1181,     1
*Nset, nset=_PickedSet33, internal
   16,   17,   35,   44,  143,  144
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*Elset, elset=_PickedSet33, internal, generate
 1022,  1081,     1
** Section: Section-6
*Shell Section, elset=_PickedSet23, material=Material-6
1., 5
** Section: Section-10
*Shell Section, elset=_PickedSet17, material=Material-10
1., 5
** Section: Section-7
*Shell Section, elset=_PickedSet14, material=Material-7
1., 5
** Section: Section-6
*Shell Section, elset=_PickedSet13, material=Material-6
1., 5
** Section: Section-5
*Shell Section, elset=_PickedSet12, material=Material-5
1., 5
** Section: Section-5
*Shell Section, elset=_PickedSet24, material=Material-5
1., 5
** Section: Section-4
*Shell Section, elset=_PickedSet25, material=Material-4
1., 5
** Section: Section-1
*Shell Section, elset=_PickedSet28, material=Material-1
1., 5
** Section: Section-7
*Shell Section, elset=_PickedSet22, material=Material-7
1., 5
** Section: Section-8
*Shell Section, elset=_PickedSet21, material=Material-8
1., 5
** Section: Section-1
*Shell Section, elset=_PickedSet4, material=Material-1
1., 5
** Section: Section-4
*Shell Section, elset=_PickedSet11, material=Material-4
1., 5
** Section: Section-3
*Shell Section, elset=_PickedSet10, material=Material-3
1., 5
** Section: Section-2
*Shell Section, elset=_PickedSet9, material=Material-2
1., 5
** Section: Section-1
*Shell Section, elset=_PickedSet8, material=Material-1
1., 5
** Section: Section-9
*Shell Section, elset=_PickedSet16, material=Material-9
1., 5
** Section: Section-8
*Shell Section, elset=_PickedSet15, material=Material-8
1., 5
** Section: Section-11
*Shell Section, elset=_PickedSet18, material=Material-11
1., 5
** Section: Section-10
*Shell Section, elset=_PickedSet19, material=Material-10
1., 5
** Section: Section-9
*Shell Section, elset=_PickedSet20, material=Material-9
1., 5
** Section: Section-2
*Shell Section, elset=_PickedSet5, material=Material-2
1., 5
** Section: Section-6
*Shell Section, elset=_PickedSet33, material=Material-6
1., 5
** Section: Section-3
*Shell Section, elset=_PickedSet6, material=Material-3
1., 5
** Section: Section-5
*Shell Section, elset=_PickedSet32, material=Material-5
1., 5
** Section: Section-4
*Shell Section, elset=_PickedSet7, material=Material-4
1., 5
** Section: Section-4
*Shell Section, elset=_PickedSet31, material=Material-4
1., 5
** Section: Section-3
*Shell Section, elset=_PickedSet30, material=Material-3
1., 5
** Section: Section-2
*Shell Section, elset=_PickedSet29, material=Material-2
1., 5
** Section: Section-3
*Shell Section, elset=_PickedSet26, material=Material-3
1., 5
** Section: Section-2
*Shell Section, elset=_PickedSet27, material=Material-2
1., 5
*End Part
**
**
** ASSEMBLY
**
*Assembly, name=Assembly
**
*Instance, name=Part-1-1, part=Part-1
*End Instance
**
*End Assembly
**
** MATERIALS
**
*Material, name=Material-1
*Elastic
210000., 0.3
*Material, name=Material-2
*Elastic
210000., 0.3
*Material, name=Material-3
*Elastic
210000., 0.3
*Material, name=Material-4
*Elastic
210000., 0.3
*Material, name=Material-5
*Elastic
210000., 0.3
*Material, name=Material-6
*Elastic
210000., 0.3
*Material, name=Material-7
*Elastic
210000., 0.3
*Material, name=Material-8
*Elastic
210000., 0.3
*Material, name=Material-9
*Elastic
210000., 0.3
*Material, name=Material-10
*Elastic
210000., 0.3
*Material, name=Material-11
*Elastic
210000., 0.3
